Redirect ../OpenDSS/Master.dss

// PV Scenario for 63.32952323373909 kW total size, Scenario type random, Sample 1 and penetration 15% (PV to load ratio)
! =====================PV SCENARIO FILE==============================
New PVSystem.small_p1ulv31790_1_2_pv phases=1 bus1=p1ulv31790.1.2 kv=0.2402 irradiance=1 Pmpp=46.591 %Pmpp=100 kVA=46.591 conn=wye %cutin=0.1 %cutout=0.1 Vmaxpu=1.2 yearly=1558705_30.20_-97.55_2019
New PVSystem.small_p1ulv62436_1_2_pv phases=1 bus1=p1ulv62436.1.2 kv=0.2402 irradiance=1 Pmpp=16.739 %Pmpp=100 kVA=16.739 conn=wye %cutin=0.1 %cutout=0.1 Vmaxpu=1.2 yearly=1540422_30.24_-97.77_2019

Solve
