Redirect ../OpenDSS/Master.dss

// PV Scenario for 63.32952323373909 kW total size, Scenario type random, Sample 2 and penetration 15% (PV to load ratio)
! =====================PV SCENARIO FILE==============================
New PVSystem.small_p1ulv53232_1_2_pv phases=1 bus1=p1ulv53232.1.2 kv=0.2402 irradiance=1 Pmpp=49.779 %Pmpp=100 kVA=49.779 conn=wye %cutin=0.1 %cutout=0.1 Vmaxpu=1.2 yearly=1565102_30.26_-97.47_2019
New PVSystem.small_p1ulv57596_1_2_3_pv phases=3 bus1=p1ulv57596.1.2.3 kv=0.48 irradiance=1 Pmpp=13.55 %Pmpp=100 kVA=13.55 conn=delta %cutin=0.1 %cutout=0.1 Vmaxpu=1.2 yearly=1568225_30.16_-97.43_2019

Solve
