Redirect ../OpenDSS/Master.dss

// PV Scenario for 21.109841077913032 kW total size, Scenario type random, Sample 2 and penetration 5% (PV to load ratio)
! =====================PV SCENARIO FILE==============================
New PVSystem.small_p1ulv53232_1_2_pv phases=1 bus1=p1ulv53232.1.2 kv=0.2402 irradiance=1 Pmpp=21.11 %Pmpp=100 kVA=21.11 conn=wye %cutin=0.1 %cutout=0.1 Vmaxpu=1.2 yearly=1565102_30.26_-97.47_2019

Solve
