Clear

New Circuit.substation_p1uhs21_69 bus1=p1uhs21_69 pu=1.0 basekV=69.0 R1=1e-05 X1=1e-05 R0=1e-05 X0=1e-05

! This is invalid because not all feeders are included.

Redirect LineCodes.dss
!Redirect p1uhs21_1247--p1udt11662/LineCodes.dss
!Redirect p1uhs21_1247--p1udt16206/LineCodes.dss
!Redirect p1uhs21_1247--p1udt20780/LineCodes.dss
Redirect p1uhs21_1247--p1udt5257/LineCodes.dss
Redirect Lines.dss
!Redirect p1uhs21_1247--p1udt11662/Lines.dss
!Redirect p1uhs21_1247--p1udt16206/Lines.dss
!Redirect p1uhs21_1247--p1udt20780/Lines.dss
Redirect p1uhs21_1247--p1udt5257/Lines.dss
Redirect Transformers.dss
!Redirect p1uhs21_1247--p1udt11662/Transformers.dss
!Redirect p1uhs21_1247--p1udt16206/Transformers.dss
!Redirect p1uhs21_1247--p1udt20780/Transformers.dss
Redirect p1uhs21_1247--p1udt5257/Transformers.dss
Redirect Regulators.dss
Redirect LoadShapes.dss
!Redirect p1uhs21_1247--p1udt11662/Loads.dss
!Redirect p1uhs21_1247--p1udt16206/Loads.dss
!Redirect p1uhs21_1247--p1udt20780/Loads.dss
Redirect p1uhs21_1247--p1udt5257/Loads.dss
!Redirect p1uhs21_1247--p1udt11662/Capacitors.dss
!Redirect p1uhs21_1247--p1udt16206/Capacitors.dss
!Redirect p1uhs21_1247--p1udt20780/Capacitors.dss
Redirect PVShapes.dss

Set Voltagebases=[0.2080002494301389, 0.48, 7.199560000000001, 12.47, 69.0]

Calcvoltagebases

Buscoords Buscoords.dss
BatchEdit Fuse..* enable=False
