New CNDATA.UG_AL_750kcmil_15_kV InsLayer=0.01 DiaIns=0.0420218 k=24 DiaStrand=0.0020499999999999997 Rstrand=0.0058592 Diam=0.022021799999999998 DiaCable=0.04572 Rac=7.549999999999999e-05 GmrStrand=0.0007994 GMRac=0.008575300000000001 Runits=m Radunits=m GMRunits=m
